*Heading
** Job name: Job-1 Model name: Model-1
** Generated by: Abaqus/CAE 6.14-5
*Preprint, echo=NO, model=NO, history=NO, contact=NO
**
** PARTS
**
*Part, name=Base-C
*Node
      1,           0.,           0.
      2,           1.,           0.
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*Element, type=CPS6M
 1,  1,  2, 13, 23, 24, 25
 2, 13, 12,  1, 26, 27, 25
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*Nset, nset=Set-Base-C, generate
  1,  63,   1
*Elset, elset=Set-Base-C, generate
  1,  20,   1
*Elset, elset=_Top-Suf-BaseC_S1, internal, generate
  2,  20,   2
*Surface, type=ELEMENT, name=Top-Suf-BaseC
_Top-Suf-BaseC_S1, S1
** Section: Section-steel
*Solid Section, elset=Set-Base-C, material=Steel
,
*End Part
**
*Part, name=Merged-Body
*Node
      1,           0.,         -2.5
      2,   33.3499985,         -2.5
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*Element, type=CPS6M
 1,   1,  47,  66, 139, 140, 141
 2,  66,   4,   1, 142, 143, 141
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*Nset, nset=Set-Base-A
   3,   4,   7,   8,  11,  12
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*Elset, elset=Set-Base-A, generate
 141,  174,    1
*Nset, nset=Set-Base-B
   1,   2,   5,   6,  47,  48
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*Elset, elset=Set-Base-B, generate
 23,  44,   1
*Nset, nset=Set-Paper
   1,   2,   3,   4,  47,  48
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*Elset, elset=Set-Paper, generate
  1,  22,   1
*Nset, nset=Set-Main-Body
   7,   8,   9,  10,  11,  12
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*Elset, elset=Set-Main-Body, generate
  45,  140,    1
*Elset, elset=_Top-of-B_S1, internal, generate
  1,  21,   2
*Surface, type=ELEMENT, name=Top-of-B
_Top-of-B_S1, S1
*Elset, elset=_Surf-Bot-Mer_S1, internal, generate
 23,  43,   2
*Surface, type=ELEMENT, name=Surf-Bot-Mer
_Surf-Bot-Mer_S1, S1
*Elset, elset="_Surf-Inner Cavity_S2", internal
  47,  53,  54,  55,  57,  59
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*Elset, elset="_Surf-Inner Cavity_S3", internal
  49, 155
*Elset, elset="_Surf-Inner Cavity_S1", internal
  52,  87,  91,  95,  99, 163, 164, 165
*Surface, type=ELEMENT, name="Surf-Inner Cavity"
"_Surf-Inner Cavity_S2", S2
"_Surf-Inner Cavity_S3", S3
"_Surf-Inner Cavity_S1", S1
** Section: Sec-Paper
*Solid Section, elset=Set-Paper, material=Paper
,
** Section: Sec-Elastosil
*Solid Section, elset=Set-Base-B, material=Elastosil
,
** Section: Sec-Elastosil
*Solid Section, elset=Set-Main-Body, material=Elastosil
,
** Section: Sec-Elastosil
*Solid Section, elset=Set-Base-A, material=Elastosil
,
*End Part
**
**
** ASSEMBLY
**
*Assembly, name=Assembly
**
*Instance, name=Base-C, part=Base-C
       28.35,          -6.,           0.
*End Instance
**
*Instance, name=Merged-Body-1, part=Merged-Body
*End Instance
**
*Nset, nset=Set-FixedFace, instance=Merged-Body-1
   7,  46, 126, 127, 128, 394, 396, 400, 407
*Elset, elset=Set-FixedFace, instance=Merged-Body-1
 130, 132, 133, 140
*Nset, nset=canh_fix_baseC, instance=Base-C
 11, 22, 61
*Elset, elset=canh_fix_baseC, instance=Base-C
 19,
*Elset, elset=_Surf-Contact_S3, internal, instance=Merged-Body-1
  86,  89,  90,  93,  94,  97,  98, 101
*Elset, elset=_Surf-Contact_S1, internal, instance=Merged-Body-1, generate
 114,  129,    1
*Surface, type=ELEMENT, name=Surf-Contact
_Surf-Contact_S3, S3
_Surf-Contact_S1, S1
*End Assembly
**
** MATERIALS
**
*Material, name=Elastosil
*Density
 1.13e-09,
*Hyperelastic, yeoh
 0.11, 0.02,   0.,   0.,   0.,   0.
*Material, name=Paper
*Density
 7.5e-10,
*Elastic
6500., 0.2
*Material, name=Steel
*Density
 7.825e-06,
*Elastic
 2.0694e+08, 0.3
**
** INTERACTION PROPERTIES
**
*Surface Interaction, name="Chamber Walls"
1.,
*Friction
0.,
*Surface Interaction, name=IntProp-1
1.,
*Friction, slip tolerance=0.005
 0.3,
**
** BOUNDARY CONDITIONS
**
** Name: BC-3 Type: Symmetry/Antisymmetry/Encastre
*Boundary
canh_fix_baseC, ENCASTRE
**
** INTERACTIONS
**
** Interaction: Walls
*Contact Pair, interaction="Chamber Walls", type=SURFACE TO SURFACE
Surf-Contact,
** Interaction: contact_baseC_gripper
*Contact Pair, interaction=IntProp-1, type=SURFACE TO SURFACE
Base-C.Top-Suf-BaseC, Merged-Body-1.Surf-Bot-Mer
** ----------------------------------------------------------------
**
** STEP: Step-Pressure
**
*Step, name=Step-Pressure, nlgeom=YES
*Static
1., 1., 1e-05, 1.
**
** BOUNDARY CONDITIONS
**
** Name: Fixed End Type: Symmetry/Antisymmetry/Encastre
*Boundary
Set-FixedFace, ENCASTRE
**
** LOADS
**
** Name: Load-Pressure   Type: Pressure
*Dsload
Merged-Body-1."Surf-Inner Cavity", P, 0.01
**
** OUTPUT REQUESTS
**
*Restart, write, frequency=0
**
** FIELD OUTPUT: F-Output-1
**
*Output, field
*Node Output
RF, U
*Contact Output
CFORCE,
**
** HISTORY OUTPUT: H-Output-1
**
*Output, history
*Node Output, nset=canh_fix_baseC
RF1, RF2, RF3, RM1, RM2, RM3
*End Step
